B(D, z) :=
    if z < D/2
        return 2*sqrt(D*z - z^2)
    else
        return D
B(1 m, 0.1 m) = 0.6 m
B(1 m, 0.6 m) = 1 m
S_u(z, mudline, gradient) := mudline + (gradient*z)
S_u(1 m, 100 Pa, 3000 Pa*m^-1) = 3100 Pa
S_u(0.6 m, 5000 Pa, 4000 Pa*m^-1) = 7400 Pa
S_u(0.01 m, 10000 Pa, 500 Pa*m^-1) = 10005 Pa
A_bm(D, z) :=
    if z < D/2
        B ← B(D, z)
        return asin(B/D)*D^2/4 - B*D/4*cos(asin(B/D))
    else
        return π*D^2/8 + D*(z - D/2)
A_bm(1 m, 0.1 m) = 0.0408753 m^2
A_bm(1 m, 0.6 m) = 0.492699 m^2
Q_v(γ, D, z, s_u_mudline, s_u_gradient) := (min(6*(z/D)^0.25, 3.4*(10*z/D)^0.5) + 1.5*γ*A_bm(D, z)/(D*S_u(z, s_u_mudline, s_u_gradient)))*D*S_u(z, s_u_mudline, s_u_gradient)
Q_v(400 kg*m^-3*g, 1 m, 0.1 m, 1 kPa, 4 kPa*m^-1) = 4964.18 N*m^-1
Q_v(500 kg*m^-3*g, 0.8 m, 0.5 m, 2 kPa, 3 kPa*m^-1) = 17374.5 N*m^-1
Q_v(600 kg*m^-3*g, 1.2 m, 0.12 m, 3 kPa, 2 kPa*m^-1) = 13637.8 N*m^-1
Q_v(1000 kg*m^-3*g, 0.1 m, 0.01 m, 4 kPa, 1 kPa*m^-1) = 1359.01 N*m^-1
k_lay(γ, D, z, s_u_mudline, s_u_gradient, EI, T_0) := max(1, 0.6 + 0.4*(EI*Q_v(γ, D, z, s_u_mudline, s_u_gradient)/(z*T_0^2))^0.25)
k_lay(400 kg*m^-3*g, 1 m, 0.1 m, 1 kPa, 10 kPa*m^-1, 1*10^6*N*m^2, 250000 N) = 1.01133
k_lay(600 kg*m^-3*g, 0.3 m, 0.2 m, 4 kPa, 4 kPa*m^-1, 5*10^5*N*m^2, 10000 N) = 2.11592
k_lay(800 kg*m^-3*g, 0.9 m, 0.01 m, 10 kPa, 1 kPa*m^-1, 2*10^6*N*m^2, 500000 N) = 1.27647
