OD := 0.1683 m
WT := 0.0127 m
ρ_steel := 7850 kg*m^-3
ρ_conc := 2400 kg*m^-3
ρ_coat := 900 kg*m^-3
ρ_seawater := 1025*kg*m^-3
t_coat := 0.003 m
t_conc := 0.04 m
ρ_cont := 150*kg*m^-3
ID := OD - 2*WT = 0.1429 m
A(OD, ID) := π*(OD^2 - ID^2)/4
W_cont := A(ID, 0 m)*ρ_cont*g = 23.5921 N*m^-1
W_steel := A(OD, ID)*ρ_steel*g = 477.918 N*m^-1
W_coat := A(OD + 2*t_coat, OD)*ρ_coat*g = 14.2492 N*m^-1
W_conc := A(OD + 2*t_coat + 2*t_conc, OD + 2*t_coat)*ρ_conc*g = 633.817 N*m^-1
B := A(OD + 2*t_coat + 2*t_conc, 0 m)*ρ_seawater*g = 510.537 N*m^-1
W_sub := W_cont + W_steel + W_coat + W_conc - B = 0.63904 kN*m^-1
