OD := 1 m
z := 0.1 m
β(z, OD) :=
    if z ≤ OD/2
        acos(1 - 2*z/OD)
    else
        π/2
β(0.1 m, 1 m) = 0.643501
β(0.6 m, 1 m) = 1.5708
ζ(z, OD) := 2*sin(β(z, OD))/(β(z, OD) + sin(β(z, OD))*cos(β(z, OD)))
ζ(0.1 m, 1 m) = 1.06809
ζ(0.6 m, 1 m) = 1.27324
ζ(0.5 m, 1 m) = 1.27324
