B(D, z) :=
    if z < D/2
        return 2*sqrt(D*z - z^2)
    else
        return D
B(1, 0.1) = 0.6
A_bm(D, z) :=
    if z < D/2
        B ← B(D, z)
        return asin(B/D)*D^2/4 - B*D/4*cos(asin(B/D))
    else
        return π*D^2/8 + D*(z - D/2)
A_bm(1, 0.1) = 0.0408753
A_bm(1, 0.6) = 0.492699
